// same curves and InvControl as LV3_55bus_withPV/PVSystems.dss (AS/NZS 4777.2 Australia A)
New XYCurve.VoltVar npts=6 xarray=[0.1 0.9 0.9565217391304348 1.0434782608695652 1.1217391304347826 2] yarray=[0.44 0.44 0 0 -0.6 -0.6]
New XYCurve.VoltWatt npts=4 xarray=[0.1 1.1 1.1304347826086956 2] yarray=[1 1 0.2 0.2]
New InvControl.invall CombiMode=VV_VW vvc_curve1=VoltVar voltwatt_curve=VoltWatt RefReactivePower=VARMAX_VARS VoltwattYAxis=PMPPPU

new PVSystem.Ld73_LOAD_A phases=1 bus1=B2547.1.4 kv=0.230 kVA=5 Pmpp=5 irradiance=1 Temperature=25 %Cutin=0.0 %Cutout=0.0 model=1 vminpu=0.1 vmaxpu=2
new PVSystem.Ld90_LOAD_B phases=1 bus1=B335.2.4 kv=0.230 kVA=5 Pmpp=5 irradiance=1 Temperature=25 %Cutin=0.0 %Cutout=0.0 model=1 vminpu=0.1 vmaxpu=2
new PVSystem.Ld163_LOAD_C phases=1 bus1=B2592.3.4 kv=0.230 kVA=5 Pmpp=5 irradiance=1 Temperature=25 %Cutin=0.0 %Cutout=0.0 model=1 vminpu=0.1 vmaxpu=2
new PVSystem.Ld168_LOAD_A phases=1 bus1=B2249.1.4 kv=0.230 kVA=5 Pmpp=5 irradiance=1 Temperature=25 %Cutin=0.0 %Cutout=0.0 model=1 vminpu=0.1 vmaxpu=2
new PVSystem.Ld182_LOAD_B phases=1 bus1=B2872.2.4 kv=0.230 kVA=5 Pmpp=5 irradiance=1 Temperature=25 %Cutin=0.0 %Cutout=0.0 model=1 vminpu=0.1 vmaxpu=2
new PVSystem.Ld244_LOAD_C phases=1 bus1=B1801.3.4 kv=0.230 kVA=5 Pmpp=5 irradiance=1 Temperature=25 %Cutin=0.0 %Cutout=0.0 model=1 vminpu=0.1 vmaxpu=2
new PVSystem.Ld312_LOAD_A phases=1 bus1=B191.1.4 kv=0.230 kVA=5 Pmpp=5 irradiance=1 Temperature=25 %Cutin=0.0 %Cutout=0.0 model=1 vminpu=0.1 vmaxpu=2
new PVSystem.Ld385_LOAD_B phases=1 bus1=B2868.2.4 kv=0.230 kVA=5 Pmpp=5 irradiance=1 Temperature=25 %Cutin=0.0 %Cutout=0.0 model=1 vminpu=0.1 vmaxpu=2
new PVSystem.Ld410_LOAD_C phases=1 bus1=B2040.3.4 kv=0.230 kVA=5 Pmpp=5 irradiance=1 Temperature=25 %Cutin=0.0 %Cutout=0.0 model=1 vminpu=0.1 vmaxpu=2
new PVSystem.Ld441_LOAD_A phases=1 bus1=B1362.1.4 kv=0.230 kVA=5 Pmpp=5 irradiance=1 Temperature=25 %Cutin=0.0 %Cutout=0.0 model=1 vminpu=0.1 vmaxpu=2
new PVSystem.Ld456_LOAD_B phases=1 bus1=B541.2.4 kv=0.230 kVA=5 Pmpp=5 irradiance=1 Temperature=25 %Cutin=0.0 %Cutout=0.0 model=1 vminpu=0.1 vmaxpu=2
new PVSystem.Ld536_LOAD_C phases=1 bus1=B578.3.4 kv=0.230 kVA=5 Pmpp=5 irradiance=1 Temperature=25 %Cutin=0.0 %Cutout=0.0 model=1 vminpu=0.1 vmaxpu=2
new PVSystem.Ld582_LOAD_A phases=1 bus1=B1544.1.4 kv=0.230 kVA=5 Pmpp=5 irradiance=1 Temperature=25 %Cutin=0.0 %Cutout=0.0 model=1 vminpu=0.1 vmaxpu=2
new PVSystem.Ld594_LOAD_B phases=1 bus1=B2228.2.4 kv=0.230 kVA=5 Pmpp=5 irradiance=1 Temperature=25 %Cutin=0.0 %Cutout=0.0 model=1 vminpu=0.1 vmaxpu=2
new PVSystem.Ld603_LOAD_C phases=1 bus1=B3153.3.4 kv=0.230 kVA=5 Pmpp=5 irradiance=1 Temperature=25 %Cutin=0.0 %Cutout=0.0 model=1 vminpu=0.1 vmaxpu=2
new PVSystem.Ld611_LOAD_A phases=1 bus1=B807.1.4 kv=0.230 kVA=5 Pmpp=5 irradiance=1 Temperature=25 %Cutin=0.0 %Cutout=0.0 model=1 vminpu=0.1 vmaxpu=2
new PVSystem.Ld689_LOAD_B phases=1 bus1=B1315.2.4 kv=0.230 kVA=5 Pmpp=5 irradiance=1 Temperature=25 %Cutin=0.0 %Cutout=0.0 model=1 vminpu=0.1 vmaxpu=2
new PVSystem.Ld718_LOAD_C phases=1 bus1=B2901.3.4 kv=0.230 kVA=5 Pmpp=5 irradiance=1 Temperature=25 %Cutin=0.0 %Cutout=0.0 model=1 vminpu=0.1 vmaxpu=2
new PVSystem.Ld735_LOAD_A phases=1 bus1=B2015.1.4 kv=0.230 kVA=5 Pmpp=5 irradiance=1 Temperature=25 %Cutin=0.0 %Cutout=0.0 model=1 vminpu=0.1 vmaxpu=2
new PVSystem.Ld781_LOAD_B phases=1 bus1=B2717.2.4 kv=0.230 kVA=5 Pmpp=5 irradiance=1 Temperature=25 %Cutin=0.0 %Cutout=0.0 model=1 vminpu=0.1 vmaxpu=2
new PVSystem.Ld857_LOAD_C phases=1 bus1=B1890.3.4 kv=0.230 kVA=5 Pmpp=5 irradiance=1 Temperature=25 %Cutin=0.0 %Cutout=0.0 model=1 vminpu=0.1 vmaxpu=2
new PVSystem.Ld890_LOAD_A phases=1 bus1=B1873.1.4 kv=0.230 kVA=5 Pmpp=5 irradiance=1 Temperature=25 %Cutin=0.0 %Cutout=0.0 model=1 vminpu=0.1 vmaxpu=2
new PVSystem.Ld898_LOAD_B phases=1 bus1=B1244.2.4 kv=0.230 kVA=5 Pmpp=5 irradiance=1 Temperature=25 %Cutin=0.0 %Cutout=0.0 model=1 vminpu=0.1 vmaxpu=2
new PVSystem.Ld906_LOAD_C phases=1 bus1=B3376.3.4 kv=0.230 kVA=5 Pmpp=5 irradiance=1 Temperature=25 %Cutin=0.0 %Cutout=0.0 model=1 vminpu=0.1 vmaxpu=2
new PVSystem.Ld925_LOAD_A phases=1 bus1=B508.1.4 kv=0.230 kVA=5 Pmpp=5 irradiance=1 Temperature=25 %Cutin=0.0 %Cutout=0.0 model=1 vminpu=0.1 vmaxpu=2
new PVSystem.Ld934_LOAD_B phases=1 bus1=B810.2.4 kv=0.230 kVA=5 Pmpp=5 irradiance=1 Temperature=25 %Cutin=0.0 %Cutout=0.0 model=1 vminpu=0.1 vmaxpu=2
new PVSystem.Ld936_LOAD_C phases=1 bus1=B528.3.4 kv=0.230 kVA=5 Pmpp=5 irradiance=1 Temperature=25 %Cutin=0.0 %Cutout=0.0 model=1 vminpu=0.1 vmaxpu=2
new PVSystem.Ld1000_LOAD_A phases=1 bus1=B1085.1.4 kv=0.230 kVA=5 Pmpp=5 irradiance=1 Temperature=25 %Cutin=0.0 %Cutout=0.0 model=1 vminpu=0.1 vmaxpu=2
new PVSystem.Ld1037_LOAD_B phases=1 bus1=B3378.2.4 kv=0.230 kVA=5 Pmpp=5 irradiance=1 Temperature=25 %Cutin=0.0 %Cutout=0.0 model=1 vminpu=0.1 vmaxpu=2
new PVSystem.Ld1064_LOAD_C phases=1 bus1=B1628.3.4 kv=0.230 kVA=5 Pmpp=5 irradiance=1 Temperature=25 %Cutin=0.0 %Cutout=0.0 model=1 vminpu=0.1 vmaxpu=2
new PVSystem.Ld1073_LOAD_A phases=1 bus1=B94.1.4 kv=0.230 kVA=5 Pmpp=5 irradiance=1 Temperature=25 %Cutin=0.0 %Cutout=0.0 model=1 vminpu=0.1 vmaxpu=2
new PVSystem.Ld1082_LOAD_B phases=1 bus1=B3292.2.4 kv=0.230 kVA=5 Pmpp=5 irradiance=1 Temperature=25 %Cutin=0.0 %Cutout=0.0 model=1 vminpu=0.1 vmaxpu=2
new PVSystem.Ld1085_LOAD_C phases=1 bus1=B2737.3.4 kv=0.230 kVA=5 Pmpp=5 irradiance=1 Temperature=25 %Cutin=0.0 %Cutout=0.0 model=1 vminpu=0.1 vmaxpu=2
new PVSystem.Ld1121_LOAD_A phases=1 bus1=B298.1.4 kv=0.230 kVA=5 Pmpp=5 irradiance=1 Temperature=25 %Cutin=0.0 %Cutout=0.0 model=1 vminpu=0.1 vmaxpu=2
new PVSystem.Ld1126_LOAD_B phases=1 bus1=B1505.2.4 kv=0.230 kVA=5 Pmpp=5 irradiance=1 Temperature=25 %Cutin=0.0 %Cutout=0.0 model=1 vminpu=0.1 vmaxpu=2
new PVSystem.Ld1247_LOAD_C phases=1 bus1=B364.3.4 kv=0.230 kVA=5 Pmpp=5 irradiance=1 Temperature=25 %Cutin=0.0 %Cutout=0.0 model=1 vminpu=0.1 vmaxpu=2
new PVSystem.Ld1310_LOAD_A phases=1 bus1=B833.1.4 kv=0.230 kVA=5 Pmpp=5 irradiance=1 Temperature=25 %Cutin=0.0 %Cutout=0.0 model=1 vminpu=0.1 vmaxpu=2
new PVSystem.Ld1318_LOAD_B phases=1 bus1=B1842.2.4 kv=0.230 kVA=5 Pmpp=5 irradiance=1 Temperature=25 %Cutin=0.0 %Cutout=0.0 model=1 vminpu=0.1 vmaxpu=2
new PVSystem.Ld1327_LOAD_C phases=1 bus1=B1643.3.4 kv=0.230 kVA=5 Pmpp=5 irradiance=1 Temperature=25 %Cutin=0.0 %Cutout=0.0 model=1 vminpu=0.1 vmaxpu=2
new PVSystem.Ld1334_LOAD_A phases=1 bus1=B3385.1.4 kv=0.230 kVA=5 Pmpp=5 irradiance=1 Temperature=25 %Cutin=0.0 %Cutout=0.0 model=1 vminpu=0.1 vmaxpu=2
new PVSystem.Ld1339_LOAD_B phases=1 bus1=B3240.2.4 kv=0.230 kVA=5 Pmpp=5 irradiance=1 Temperature=25 %Cutin=0.0 %Cutout=0.0 model=1 vminpu=0.1 vmaxpu=2
new PVSystem.Ld1414_LOAD_C phases=1 bus1=B2137.3.4 kv=0.230 kVA=5 Pmpp=5 irradiance=1 Temperature=25 %Cutin=0.0 %Cutout=0.0 model=1 vminpu=0.1 vmaxpu=2
new PVSystem.Ld1548_LOAD_A phases=1 bus1=B1475.1.4 kv=0.230 kVA=5 Pmpp=5 irradiance=1 Temperature=25 %Cutin=0.0 %Cutout=0.0 model=1 vminpu=0.1 vmaxpu=2
new PVSystem.Ld1648_LOAD_B phases=1 bus1=B847.2.4 kv=0.230 kVA=5 Pmpp=5 irradiance=1 Temperature=25 %Cutin=0.0 %Cutout=0.0 model=1 vminpu=0.1 vmaxpu=2
new PVSystem.Ld1667_LOAD_C phases=1 bus1=B768.3.4 kv=0.230 kVA=5 Pmpp=5 irradiance=1 Temperature=25 %Cutin=0.0 %Cutout=0.0 model=1 vminpu=0.1 vmaxpu=2
new PVSystem.Ld1691_LOAD_A phases=1 bus1=B3051.1.4 kv=0.230 kVA=5 Pmpp=5 irradiance=1 Temperature=25 %Cutin=0.0 %Cutout=0.0 model=1 vminpu=0.1 vmaxpu=2
new PVSystem.Ld1695_LOAD_B phases=1 bus1=B1502.2.4 kv=0.230 kVA=5 Pmpp=5 irradiance=1 Temperature=25 %Cutin=0.0 %Cutout=0.0 model=1 vminpu=0.1 vmaxpu=2
new PVSystem.Ld1700_LOAD_C phases=1 bus1=B695.3.4 kv=0.230 kVA=5 Pmpp=5 irradiance=1 Temperature=25 %Cutin=0.0 %Cutout=0.0 model=1 vminpu=0.1 vmaxpu=2
new PVSystem.Ld1728_LOAD_A phases=1 bus1=B1015.1.4 kv=0.230 kVA=5 Pmpp=5 irradiance=1 Temperature=25 %Cutin=0.0 %Cutout=0.0 model=1 vminpu=0.1 vmaxpu=2
new PVSystem.Ld1802_LOAD_B phases=1 bus1=B257.2.4 kv=0.230 kVA=5 Pmpp=5 irradiance=1 Temperature=25 %Cutin=0.0 %Cutout=0.0 model=1 vminpu=0.1 vmaxpu=2
new PVSystem.Ld1812_LOAD_C phases=1 bus1=B1988.3.4 kv=0.230 kVA=5 Pmpp=5 irradiance=1 Temperature=25 %Cutin=0.0 %Cutout=0.0 model=1 vminpu=0.1 vmaxpu=2
new PVSystem.Ld1932_LOAD_A phases=1 bus1=B2810.1.4 kv=0.230 kVA=5 Pmpp=5 irradiance=1 Temperature=25 %Cutin=0.0 %Cutout=0.0 model=1 vminpu=0.1 vmaxpu=2
new PVSystem.Ld1958_LOAD_B phases=1 bus1=B1725.2.4 kv=0.230 kVA=5 Pmpp=5 irradiance=1 Temperature=25 %Cutin=0.0 %Cutout=0.0 model=1 vminpu=0.1 vmaxpu=2
new PVSystem.Ld2038_LOAD_C phases=1 bus1=B2891.3.4 kv=0.230 kVA=5 Pmpp=5 irradiance=1 Temperature=25 %Cutin=0.0 %Cutout=0.0 model=1 vminpu=0.1 vmaxpu=2
new PVSystem.Ld2144_LOAD_A phases=1 bus1=B1097.1.4 kv=0.230 kVA=5 Pmpp=5 irradiance=1 Temperature=25 %Cutin=0.0 %Cutout=0.0 model=1 vminpu=0.1 vmaxpu=2
new PVSystem.Ld2168_LOAD_B phases=1 bus1=B1718.2.4 kv=0.230 kVA=5 Pmpp=5 irradiance=1 Temperature=25 %Cutin=0.0 %Cutout=0.0 model=1 vminpu=0.1 vmaxpu=2
new PVSystem.Ld2256_LOAD_C phases=1 bus1=B1865.3.4 kv=0.230 kVA=5 Pmpp=5 irradiance=1 Temperature=25 %Cutin=0.0 %Cutout=0.0 model=1 vminpu=0.1 vmaxpu=2
new PVSystem.Ld2275_LOAD_A phases=1 bus1=B1632.1.4 kv=0.230 kVA=5 Pmpp=5 irradiance=1 Temperature=25 %Cutin=0.0 %Cutout=0.0 model=1 vminpu=0.1 vmaxpu=2
new PVSystem.Ld2283_LOAD_B phases=1 bus1=B773.2.4 kv=0.230 kVA=5 Pmpp=5 irradiance=1 Temperature=25 %Cutin=0.0 %Cutout=0.0 model=1 vminpu=0.1 vmaxpu=2
new PVSystem.Ld2351_LOAD_C phases=1 bus1=B2283.3.4 kv=0.230 kVA=5 Pmpp=5 irradiance=1 Temperature=25 %Cutin=0.0 %Cutout=0.0 model=1 vminpu=0.1 vmaxpu=2
new PVSystem.Ld2393_LOAD_A phases=1 bus1=B792.1.4 kv=0.230 kVA=5 Pmpp=5 irradiance=1 Temperature=25 %Cutin=0.0 %Cutout=0.0 model=1 vminpu=0.1 vmaxpu=2
new PVSystem.Ld2413_LOAD_B phases=1 bus1=B2321.2.4 kv=0.230 kVA=5 Pmpp=5 irradiance=1 Temperature=25 %Cutin=0.0 %Cutout=0.0 model=1 vminpu=0.1 vmaxpu=2
new PVSystem.Ld2416_LOAD_C phases=1 bus1=B1237.3.4 kv=0.230 kVA=5 Pmpp=5 irradiance=1 Temperature=25 %Cutin=0.0 %Cutout=0.0 model=1 vminpu=0.1 vmaxpu=2
new PVSystem.Ld2426_LOAD_A phases=1 bus1=B1200.1.4 kv=0.230 kVA=5 Pmpp=5 irradiance=1 Temperature=25 %Cutin=0.0 %Cutout=0.0 model=1 vminpu=0.1 vmaxpu=2
new PVSystem.Ld2428_LOAD_B phases=1 bus1=B2006.2.4 kv=0.230 kVA=5 Pmpp=5 irradiance=1 Temperature=25 %Cutin=0.0 %Cutout=0.0 model=1 vminpu=0.1 vmaxpu=2
new PVSystem.Ld2488_LOAD_C phases=1 bus1=B1557.3.4 kv=0.230 kVA=5 Pmpp=5 irradiance=1 Temperature=25 %Cutin=0.0 %Cutout=0.0 model=1 vminpu=0.1 vmaxpu=2
new PVSystem.Ld2578_LOAD_A phases=1 bus1=B89.1.4 kv=0.230 kVA=5 Pmpp=5 irradiance=1 Temperature=25 %Cutin=0.0 %Cutout=0.0 model=1 vminpu=0.1 vmaxpu=2
new PVSystem.Ld2651_LOAD_B phases=1 bus1=B2647.2.4 kv=0.230 kVA=5 Pmpp=5 irradiance=1 Temperature=25 %Cutin=0.0 %Cutout=0.0 model=1 vminpu=0.1 vmaxpu=2
new PVSystem.Ld2655_LOAD_C phases=1 bus1=B2564.3.4 kv=0.230 kVA=5 Pmpp=5 irradiance=1 Temperature=25 %Cutin=0.0 %Cutout=0.0 model=1 vminpu=0.1 vmaxpu=2
new PVSystem.Ld2668_LOAD_A phases=1 bus1=B534.1.4 kv=0.230 kVA=5 Pmpp=5 irradiance=1 Temperature=25 %Cutin=0.0 %Cutout=0.0 model=1 vminpu=0.1 vmaxpu=2
new PVSystem.Ld2719_LOAD_B phases=1 bus1=B941.2.4 kv=0.230 kVA=5 Pmpp=5 irradiance=1 Temperature=25 %Cutin=0.0 %Cutout=0.0 model=1 vminpu=0.1 vmaxpu=2
new PVSystem.Ld2730_LOAD_C phases=1 bus1=B553.3.4 kv=0.230 kVA=5 Pmpp=5 irradiance=1 Temperature=25 %Cutin=0.0 %Cutout=0.0 model=1 vminpu=0.1 vmaxpu=2
new PVSystem.Ld2747_LOAD_A phases=1 bus1=B2764.1.4 kv=0.230 kVA=5 Pmpp=5 irradiance=1 Temperature=25 %Cutin=0.0 %Cutout=0.0 model=1 vminpu=0.1 vmaxpu=2
new PVSystem.Ld2786_LOAD_B phases=1 bus1=B2789.2.4 kv=0.230 kVA=5 Pmpp=5 irradiance=1 Temperature=25 %Cutin=0.0 %Cutout=0.0 model=1 vminpu=0.1 vmaxpu=2
new PVSystem.Ld2837_LOAD_C phases=1 bus1=B2266.3.4 kv=0.230 kVA=5 Pmpp=5 irradiance=1 Temperature=25 %Cutin=0.0 %Cutout=0.0 model=1 vminpu=0.1 vmaxpu=2
new PVSystem.Ld2842_LOAD_A phases=1 bus1=B2417.1.4 kv=0.230 kVA=5 Pmpp=5 irradiance=1 Temperature=25 %Cutin=0.0 %Cutout=0.0 model=1 vminpu=0.1 vmaxpu=2
new PVSystem.Ld2984_LOAD_B phases=1 bus1=B2530.2.4 kv=0.230 kVA=5 Pmpp=5 irradiance=1 Temperature=25 %Cutin=0.0 %Cutout=0.0 model=1 vminpu=0.1 vmaxpu=2
new PVSystem.Ld3010_LOAD_C phases=1 bus1=B2723.3.4 kv=0.230 kVA=5 Pmpp=5 irradiance=1 Temperature=25 %Cutin=0.0 %Cutout=0.0 model=1 vminpu=0.1 vmaxpu=2
new PVSystem.Ld3085_LOAD_A phases=1 bus1=B1824.1.4 kv=0.230 kVA=5 Pmpp=5 irradiance=1 Temperature=25 %Cutin=0.0 %Cutout=0.0 model=1 vminpu=0.1 vmaxpu=2
new PVSystem.Ld3097_LOAD_B phases=1 bus1=B1666.2.4 kv=0.230 kVA=5 Pmpp=5 irradiance=1 Temperature=25 %Cutin=0.0 %Cutout=0.0 model=1 vminpu=0.1 vmaxpu=2
new PVSystem.Ld3124_LOAD_C phases=1 bus1=B1837.3.4 kv=0.230 kVA=5 Pmpp=5 irradiance=1 Temperature=25 %Cutin=0.0 %Cutout=0.0 model=1 vminpu=0.1 vmaxpu=2
new PVSystem.Ld3172_LOAD_A phases=1 bus1=B907.1.4 kv=0.230 kVA=5 Pmpp=5 irradiance=1 Temperature=25 %Cutin=0.0 %Cutout=0.0 model=1 vminpu=0.1 vmaxpu=2
new PVSystem.Ld3190_LOAD_B phases=1 bus1=B237.2.4 kv=0.230 kVA=5 Pmpp=5 irradiance=1 Temperature=25 %Cutin=0.0 %Cutout=0.0 model=1 vminpu=0.1 vmaxpu=2
new PVSystem.Ld3386_LOAD_C phases=1 bus1=B2003.3.4 kv=0.230 kVA=5 Pmpp=5 irradiance=1 Temperature=25 %Cutin=0.0 %Cutout=0.0 model=1 vminpu=0.1 vmaxpu=2
new PVSystem.Ld3420_LOAD_A phases=1 bus1=B466.1.4 kv=0.230 kVA=5 Pmpp=5 irradiance=1 Temperature=25 %Cutin=0.0 %Cutout=0.0 model=1 vminpu=0.1 vmaxpu=2
new PVSystem.Ld3421_LOAD_B phases=1 bus1=B1378.2.4 kv=0.230 kVA=5 Pmpp=5 irradiance=1 Temperature=25 %Cutin=0.0 %Cutout=0.0 model=1 vminpu=0.1 vmaxpu=2
new PVSystem.Ld3442_LOAD_C phases=1 bus1=B2333.3.4 kv=0.230 kVA=5 Pmpp=5 irradiance=1 Temperature=25 %Cutin=0.0 %Cutout=0.0 model=1 vminpu=0.1 vmaxpu=2
new PVSystem.Ld3460_LOAD_A phases=1 bus1=B2209.1.4 kv=0.230 kVA=5 Pmpp=5 irradiance=1 Temperature=25 %Cutin=0.0 %Cutout=0.0 model=1 vminpu=0.1 vmaxpu=2
new PVSystem.Ld3464_LOAD_B phases=1 bus1=B625.2.4 kv=0.230 kVA=5 Pmpp=5 irradiance=1 Temperature=25 %Cutin=0.0 %Cutout=0.0 model=1 vminpu=0.1 vmaxpu=2
new PVSystem.Ld3578_LOAD_C phases=1 bus1=B3362.3.4 kv=0.230 kVA=5 Pmpp=5 irradiance=1 Temperature=25 %Cutin=0.0 %Cutout=0.0 model=1 vminpu=0.1 vmaxpu=2
new PVSystem.Ld3599_LOAD_A phases=1 bus1=B2779.1.4 kv=0.230 kVA=5 Pmpp=5 irradiance=1 Temperature=25 %Cutin=0.0 %Cutout=0.0 model=1 vminpu=0.1 vmaxpu=2
new PVSystem.Ld3646_LOAD_B phases=1 bus1=B30.2.4 kv=0.230 kVA=5 Pmpp=5 irradiance=1 Temperature=25 %Cutin=0.0 %Cutout=0.0 model=1 vminpu=0.1 vmaxpu=2
new PVSystem.Ld3679_LOAD_C phases=1 bus1=B1591.3.4 kv=0.230 kVA=5 Pmpp=5 irradiance=1 Temperature=25 %Cutin=0.0 %Cutout=0.0 model=1 vminpu=0.1 vmaxpu=2
new PVSystem.Ld3681_LOAD_A phases=1 bus1=B3070.1.4 kv=0.230 kVA=5 Pmpp=5 irradiance=1 Temperature=25 %Cutin=0.0 %Cutout=0.0 model=1 vminpu=0.1 vmaxpu=2
new PVSystem.Ld3715_LOAD_B phases=1 bus1=B1416.2.4 kv=0.230 kVA=5 Pmpp=5 irradiance=1 Temperature=25 %Cutin=0.0 %Cutout=0.0 model=1 vminpu=0.1 vmaxpu=2
new PVSystem.Ld3739_LOAD_C phases=1 bus1=B1590.3.4 kv=0.230 kVA=5 Pmpp=5 irradiance=1 Temperature=25 %Cutin=0.0 %Cutout=0.0 model=1 vminpu=0.1 vmaxpu=2
new PVSystem.Ld3783_LOAD_A phases=1 bus1=B1855.1.4 kv=0.230 kVA=5 Pmpp=5 irradiance=1 Temperature=25 %Cutin=0.0 %Cutout=0.0 model=1 vminpu=0.1 vmaxpu=2
new PVSystem.Ld3792_LOAD_B phases=1 bus1=B2977.2.4 kv=0.230 kVA=5 Pmpp=5 irradiance=1 Temperature=25 %Cutin=0.0 %Cutout=0.0 model=1 vminpu=0.1 vmaxpu=2
new PVSystem.Ld3850_LOAD_C phases=1 bus1=B1872.3.4 kv=0.230 kVA=5 Pmpp=5 irradiance=1 Temperature=25 %Cutin=0.0 %Cutout=0.0 model=1 vminpu=0.1 vmaxpu=2
new PVSystem.Ld3878_LOAD_A phases=1 bus1=B435.1.4 kv=0.230 kVA=5 Pmpp=5 irradiance=1 Temperature=25 %Cutin=0.0 %Cutout=0.0 model=1 vminpu=0.1 vmaxpu=2
new PVSystem.Ld3883_LOAD_B phases=1 bus1=B2815.2.4 kv=0.230 kVA=5 Pmpp=5 irradiance=1 Temperature=25 %Cutin=0.0 %Cutout=0.0 model=1 vminpu=0.1 vmaxpu=2
new PVSystem.Ld3936_LOAD_C phases=1 bus1=B1226.3.4 kv=0.230 kVA=5 Pmpp=5 irradiance=1 Temperature=25 %Cutin=0.0 %Cutout=0.0 model=1 vminpu=0.1 vmaxpu=2
new PVSystem.Ld3940_LOAD_A phases=1 bus1=B1905.1.4 kv=0.230 kVA=5 Pmpp=5 irradiance=1 Temperature=25 %Cutin=0.0 %Cutout=0.0 model=1 vminpu=0.1 vmaxpu=2
new PVSystem.Ld3957_LOAD_B phases=1 bus1=B162.2.4 kv=0.230 kVA=5 Pmpp=5 irradiance=1 Temperature=25 %Cutin=0.0 %Cutout=0.0 model=1 vminpu=0.1 vmaxpu=2
new PVSystem.Ld3972_LOAD_C phases=1 bus1=B1139.3.4 kv=0.230 kVA=5 Pmpp=5 irradiance=1 Temperature=25 %Cutin=0.0 %Cutout=0.0 model=1 vminpu=0.1 vmaxpu=2
new PVSystem.Ld4012_LOAD_A phases=1 bus1=B1407.1.4 kv=0.230 kVA=5 Pmpp=5 irradiance=1 Temperature=25 %Cutin=0.0 %Cutout=0.0 model=1 vminpu=0.1 vmaxpu=2
new PVSystem.Ld4021_LOAD_B phases=1 bus1=B1095.2.4 kv=0.230 kVA=5 Pmpp=5 irradiance=1 Temperature=25 %Cutin=0.0 %Cutout=0.0 model=1 vminpu=0.1 vmaxpu=2
new PVSystem.Ld4024_LOAD_C phases=1 bus1=B798.3.4 kv=0.230 kVA=5 Pmpp=5 irradiance=1 Temperature=25 %Cutin=0.0 %Cutout=0.0 model=1 vminpu=0.1 vmaxpu=2
new PVSystem.Ld4029_LOAD_A phases=1 bus1=B787.1.4 kv=0.230 kVA=5 Pmpp=5 irradiance=1 Temperature=25 %Cutin=0.0 %Cutout=0.0 model=1 vminpu=0.1 vmaxpu=2
new PVSystem.Ld4163_LOAD_B phases=1 bus1=B2510.2.4 kv=0.230 kVA=5 Pmpp=5 irradiance=1 Temperature=25 %Cutin=0.0 %Cutout=0.0 model=1 vminpu=0.1 vmaxpu=2
new PVSystem.Ld4191_LOAD_C phases=1 bus1=B2349.3.4 kv=0.230 kVA=5 Pmpp=5 irradiance=1 Temperature=25 %Cutin=0.0 %Cutout=0.0 model=1 vminpu=0.1 vmaxpu=2
new PVSystem.Ld4200_LOAD_A phases=1 bus1=B3005.1.4 kv=0.230 kVA=5 Pmpp=5 irradiance=1 Temperature=25 %Cutin=0.0 %Cutout=0.0 model=1 vminpu=0.1 vmaxpu=2
new PVSystem.Ld4272_LOAD_B phases=1 bus1=B1998.2.4 kv=0.230 kVA=5 Pmpp=5 irradiance=1 Temperature=25 %Cutin=0.0 %Cutout=0.0 model=1 vminpu=0.1 vmaxpu=2
new PVSystem.Ld4305_LOAD_C phases=1 bus1=B1723.3.4 kv=0.230 kVA=5 Pmpp=5 irradiance=1 Temperature=25 %Cutin=0.0 %Cutout=0.0 model=1 vminpu=0.1 vmaxpu=2
new PVSystem.Ld4513_LOAD_A phases=1 bus1=B2397.1.4 kv=0.230 kVA=5 Pmpp=5 irradiance=1 Temperature=25 %Cutin=0.0 %Cutout=0.0 model=1 vminpu=0.1 vmaxpu=2
new PVSystem.Ld4554_LOAD_B phases=1 bus1=B1790.2.4 kv=0.230 kVA=5 Pmpp=5 irradiance=1 Temperature=25 %Cutin=0.0 %Cutout=0.0 model=1 vminpu=0.1 vmaxpu=2
new PVSystem.Ld4578_LOAD_C phases=1 bus1=B326.3.4 kv=0.230 kVA=5 Pmpp=5 irradiance=1 Temperature=25 %Cutin=0.0 %Cutout=0.0 model=1 vminpu=0.1 vmaxpu=2
new PVSystem.Ld4584_LOAD_A phases=1 bus1=B1852.1.4 kv=0.230 kVA=5 Pmpp=5 irradiance=1 Temperature=25 %Cutin=0.0 %Cutout=0.0 model=1 vminpu=0.1 vmaxpu=2
new PVSystem.Ld4598_LOAD_B phases=1 bus1=B1572.2.4 kv=0.230 kVA=5 Pmpp=5 irradiance=1 Temperature=25 %Cutin=0.0 %Cutout=0.0 model=1 vminpu=0.1 vmaxpu=2
new PVSystem.Ld4610_LOAD_C phases=1 bus1=B840.3.4 kv=0.230 kVA=5 Pmpp=5 irradiance=1 Temperature=25 %Cutin=0.0 %Cutout=0.0 model=1 vminpu=0.1 vmaxpu=2
new PVSystem.Ld4637_LOAD_A phases=1 bus1=B2174.1.4 kv=0.230 kVA=5 Pmpp=5 irradiance=1 Temperature=25 %Cutin=0.0 %Cutout=0.0 model=1 vminpu=0.1 vmaxpu=2
new PVSystem.Ld4676_LOAD_B phases=1 bus1=B1017.2.4 kv=0.230 kVA=5 Pmpp=5 irradiance=1 Temperature=25 %Cutin=0.0 %Cutout=0.0 model=1 vminpu=0.1 vmaxpu=2
new PVSystem.Ld4703_LOAD_C phases=1 bus1=B1423.3.4 kv=0.230 kVA=5 Pmpp=5 irradiance=1 Temperature=25 %Cutin=0.0 %Cutout=0.0 model=1 vminpu=0.1 vmaxpu=2

Edit InvControl.invall VarChangeTolerance=1e-6 VoltageChangeTolerance=1e-7 ActivePChangeTolerance=1e-6
